f(x) := 3*x[1] + 4*x[2] + 5*x[3]
ORIGIN := 1
n := 2
M := [1.2, 1.4, 0.8; 80, 280, 240; 5, 5, 100]
x := [1; 1; 1]
V := [1.6; 200; 10]
c := [3; 4; 5]
f(x) := c*x
Given
M*x ≥ V
x ≥ 0
Minimize(f, x) = [0.769231; 0.461538; 0.0384615]
f([0.769; 0.462; 0.038]) = 4.345
