f(x) := sin(0.5*x) + 1 - x^2
f(1) = 0.479426
f(2) = -2.15853
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x1 := 0
x2 := 1
Div2(f, x1, x2, ε) :=
    L ← x2 - x1
    i ← 0
    while L > ε
        c ← (x2 + x1)/2
        x2 ← c if f(c)*f(x1) < 0
        x1 ← c otherwise
        L ← x2 - x1
        R[i, 0] ← i
        R[i, 1] ← c
        i ← i + 1
    R
q := Div2(f, 1, 2, 0.5*10^-4)
q = [
    0, 1.5;
    1, 1.25;
    2, 1.375;
    3, 1.3125;
    4, 1.28125;
    5, 1.26562;
    6, 1.25781;
    7, 1.26172;
    8, 1.25977;
    9, 1.26074;
    10, 1.26025;
    11, 1.2605;
    12, 1.26062;
    13, 1.26068;
    14, 1.26071
]
x[14] := 1.26068
n := 0 .. 10
a := 1
b := 2
x[0] := a
dz(x) := f(x)/d/dx(f(x))
x[n + 1] := x[n] - f(x[n])*(b - x[n])/(f(b) - f(x[n]))
x[n] = [1; 1.18174; 1.2384; 1.25454; 1.25903; 1.26026; 1.2606; 1.26069; 1.26072; 1.26073; 1.26073]
|dz(x[n])| = [0.307086; 0.0824182; 0.0225918; 0.00620522; 0.00170484; 0.00046842; 0.000128704; 3.53631e-5; 9.71649e-6; 2.66974e-6; 7.33546e-7]
b := 2
a := 1
f_2(x) := d^2/dx^2(f(x))
b = 2
nt :=
    a if f(a)*f_2(a) ≥ 0
    b otherwise
nt = 2
n := 0 .. 10
x[0] := b
f_1(x) := d/dx(f(x))
x[n + 1] := x[n] - f(x[n])/f_1(x[n])
dz(x) := |f(x)/f_1(nt)|
x[n] = [2; 1.42128; 1.27202; 1.26079; 1.26073; 1.26073; 1.26073; 1.26073; 1.26073; 1.26073; 1.26073]
dz(x[n]) = [0.578718; 0.0985895; 0.00644606; 3.6287e-5; 1.17583e-9; 0; 0; 0; 0; 0; 0]
ln(x) + (x + 1)^3 =  # error: Функция не определена в одной или нескольких указанных точках.
