f(x) := ((x - 2)^2 - 1)*2^x - 1
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f(2.5) = -5.24264
a := f(2.5)
f(3.5) = 13.1421
b := f(3.5)
x := 2.5, 2.6 .. 3.5
f(x) = [-5.24264; -4.88023; -4.31399; -3.50719; -2.41821; -1; 0.800579; 3.04342; 5.79592; 9.13382; 13.1421]
f_1pr(x) := d/dx(f(x))
|f_1pr(x)| = [2.71608; 4.58587; 6.80014; 9.4052; 12.4526; 16; 20.1113; 24.8577; 30.3184; 36.5812; 43.7437]
maxf := max(|f_1pr(2.5)|, |f_1pr(3.5)|)
maxf = 43.7437
m := -1/maxf
m = -0.0228604
ф(x) := x - m*f(x)
ф(x) = [2.38015; 2.48844; 2.60138; 2.71982; 2.84472; 2.97714; 3.1183; 3.26957; 3.4325; 3.6088; 3.80043]
ф_1pr(x) := d/dx(ф(x))
q := ф_1pr(2.5)
q = 1.06209
ф_1pr(x) = [1.06209; 1.10483; 1.15545; 1.21501; 1.28467; 1.36577; 1.45975; 1.56826; 1.69309; 1.83626; 2]
ε := 0.5*10^-5
A := ε*(1 - q)/q
A = -2.92304e-7
i := 1 .. 50
x[0] := 2.5
z(x) := x - m*f(x)
x[i] := z(x[i - 1])
|x[i] - x[i - 1]| = [
    0.119849; 0.124671; 0.124893; 0.121258; 0.114887; 0.106903; 0.098218; 0.0894702; 0.0810579; 0.0731984
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]
x = [
    2.5; 2.38015; 2.25548; 2.13059; 2.00933; 1.89444; 1.78754; 1.68932; 1.59985; 1.51879
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]
x[32] = 0.831076  # ответ
ORIGIN := 1
A := [3.14, -2.12, 1.17; -2.12, 1.32, -2.45; 1.17, -2.45, 1.18]
B := [1.27; 2.13; 3.14]
|A| = -8.91337
augment(A, B) = [3.14, -2.12, 1.17, 1.27; -2.12, 1.32, -2.45, 2.13; 1.17, -2.45, 1.18, 3.14]
A := augment(A, B)
m := [-A[1, 2]/A[3, 2]; -A[2, 2]/A[3, 2]; -A[3, 2]/A[3, 2]]
m = [-0.865306; 0.538776; -1]
A1 := [
    A[1, 1] + m[1]*1.17, 0, A[1, 3] + m[1]*1.18, A[1, 4] + m[1]*3.14;
    A[2, 1] + m[2]*1.17, 0, A[2, 3] + m[2]*1.18, A[2, 4] + m[2]*3.14;
    1.17, -2.45, 1.18, 3.14
]
A1 = [2.12759, 0, 0.148939, -1.44706; -1.48963, 0, -1.81424, 3.82176; 1.17, -2.45, 1.18, 3.14]
m1 := [-A1[1, 3]/A1[1, 3]; -A1[2, 3]/A1[1, 3]; -A1[3, 3]/A1[1, 3]]
m1 = [-1; 12.1811; -7.92272]
A2 := [
    2.128, 0, 0.149, -1.447;
    A1[2, 1] + m1[2]*2.128, 0, 0, A1[2, 4] + m1[2]*(-1.447);
    A1[3, 1] + m1[3]*2.128, -2.45, 0, A1[3, 4] + m1[3]*(-1.447)
]
A2 = [2.128, 0, 0.149, -1.447; 24.4318, 0, 0, -13.8044; -15.6895, -2.45, 0, 14.6042]
m2 := [-A2[1, 1]/A2[2, 1]; -A2[2, 1]/A2[2, 1]; -A2[3, 1]/A2[2, 1]]
m2 = [-0.0870994; -1; 0.642176]
A3 := [
    0, 0, 0.149, A2[1, 4] + m2[1]*(-13.804);
    24.432, 0, 0, -13.804;
    0, -2.45, 0, A2[3, 4] + m2[3]*(-13.804)
]
A3 = [0, 0, 0.149, -0.244679; 24.432, 0, 0, -13.804; 0, -2.45, 0, 5.73958]
X := [A3[2, 4]/A3[2, 1]; A3[3, 4]/A3[3, 2]; A3[1, 4]/A3[1, 3]]
X = [-0.564997; -2.34268; -1.64214]
S := rref(A)
S = [1, 0, 0, -0.565161; 0, 1, 0, -2.3426; 0, 0, 1, -1.64249]
x := submatrix(S, 1, 3, 4, 4)
x = [-0.565161; -2.3426; -1.64249]
A := 0
B := 0
a := [400, -11, 10; 2, 800, 8; -6, 6, 1200]
b := [-4334; 3226; 13290]
i := 1 .. 3
j := 1 .. 3
A[i, j] := -a[i, j]/a[i, i]
B[i] := b[i]/a[i, i]
A[i, i] := 0
A = [0, 0.0275, -0.025; -0.0025, 0, -0.01; 0.005, -0.005, 0]
B = [-10.835; 4.0325; 11.075]
