ORIGIN := 1
A := [3.14, -2.12, 1.17; -2.12, 1.32, -2.45; 1.17, -2.45, 1.18]
B := [1.27; 2.13; 3.14]
|A| = -8.91337
augment(A, B) = [3.14, -2.12, 1.17, 1.27; -2.12, 1.32, -2.45, 2.13; 1.17, -2.45, 1.18, 3.14]
A := augment(A, B)
m := [-A[1, 1]/A[1, 1]; -A[2, 1]/A[1, 1]; -A[3, 1]/A[1, 1]]
m = [-1; 0.675159; -0.372611]
A1 := [
    3.14, -2.12, 1.17, 1.27;
    0, A[2, 2] + m[2]*(-2.12), A[2, 3] + m[2]*1.17, A[2, 4] + m[2]*1.27;
    0, A[3, 2] + m[3]*(-2.12), A[3, 3] + m[3]*1.17, A[3, 4] + m[3]*1.27
]
A1 = [3.14, -2.12, 1.17, 1.27; 0, -0.111338, -1.66006, 2.98745; 0, -1.66006, 0.744045, 2.66678]
m1 := [-A1[1, 3]/A1[2, 3]; -A1[2, 3]/A1[2, 3]; -A1[3, 3]/A1[2, 3]]
m1 = [0.704792; -1; 0.448202]
A2 := [
    3.14, A1[1, 2] + m1[1]*(-0.11134), 0, A1[1, 4] + m1[1]*2.98745;
    0, -0.11134, -1.66006, 2.98745;
    0, A1[3, 2] + m1[3]*(-0.11134), 0, A1[3, 4] + m1[3]*2.98745
]
A2 = [3.14, -2.19847, 0, 3.37553; 0, -0.11134, -1.66006, 2.98745; 0, -1.70997, 0, 4.00577]
m2 := [-A2[1, 2]/A2[3, 2]; -A2[2, 2]/A2[3, 2]; -A2[3, 2]/A2[3, 2]]
m2 = [-1.28568; -0.0651124; -1]
A3 := [
    3.14, 0, 0, A2[1, 4] + m2[1]*4.00577;
    0, 0, -1.66006, A2[2, 4] + m2[2]*4.00577;
    0, -1.70997, 0, 4.00577
]
A3 = [3.14, 0, 0, -1.77461; 0, 0, -1.66006, 2.72662; 0, -1.70997, 0, 4.00577]
X := [A3[1, 4]/A3[1, 1]; A3[3, 4]/A3[3, 2]; A3[2, 4]/A3[2, 3]]
X = [-0.565163; -2.3426; -1.64249]
S := rref(A)
S = [1, 0, 0, -0.565161; 0, 1, 0, -2.3426; 0, 0, 1, -1.64249]
x := submatrix(S, 1, 3, 4, 4)
x = [-0.565161; -2.3426; -1.64249]
X - x = [-2.04445e-6; 4.33448e-6; 1.12927e-6]
