a := [900, -6, 5; 4.5, 180, 5.5; -1, 1, 2700]
b := [-5424; 16210; 16220]
i := 0 .. 2
j := 0 .. 2
A[i, j] := -a[i, j]/a[i, i]
B[i] := b[i]/a[i, i]
A[i, i] := 0
A = [0, 0.00666667, -0.00555556; -0.025, 0, -0.0305556; 0.00037037, -0.00037037, 0]
B = [-6.02667; 90.0556; 6.00741]
α1 := normi(A)
α1 = 0.0555556
α2 := norm1(A)
α2 = 0.0361111
α3 := norme(A)
α3 = 0.0404255
ε := 0.5*10^-4
E := ε*(1 - α2)/α2
E = 0.00133462
k := 0 .. 10
x[:, 0] := B
x[:, k + 1] := B + A*x[:, k]
x = [
    -6.02667, -5.45967, -5.45969, -5.45978, -5.45978, -5.45978, -5.45978, -5.45978, -5.45978, -5.45978, -5.45978, -5.45978;
    90.0556, 90.0227, 90.0096, 90.0096, 90.0096, 90.0096, 90.0096, 90.0096, 90.0096, 90.0096, 90.0096, 90.0096;
    6.00741, 5.97182, 5.97204, 5.97205, 5.97205, 5.97205, 5.97205, 5.97205, 5.97205, 5.97205, 5.97205, 5.97205
]
|x[:, k + 1][0] - x[:, k][0]| + |x[:, k + 1][1] - x[:, k][1]| + |x[:, k + 1][2] - x[:, k][2]| = [0.635475; 0.0133313; 9.95731e-5; 2.16325e-6; 1.73651e-8; 3.50333e-10; 2.99405e-12; 6.21725e-14; 0; 0; 0]
X := x[:, 2]
X = [-5.45969; 90.0096; 5.97204]
