vx := [0.68; 0.73; 0.80; 0.88]
vy := [0.80866; 0.89492; 1.02964; 1.20966]
n := 3
i := 0 .. n
j := 0 .. n
f(x) := sum(vy[i]*product(if(i == j, 1, (x - vx[j])/(vx[i] - vx[j])), j), i)
f(0.80) = 1.02964
f(0.774) = 0.977426
XI[j, i] := vx[j]^i
XI[j, 0] := 1
XI = [
    1, 0.68, 0.4624, 0.314432;
    1, 0.73, 0.5329, 0.389017;
    1, 0.8, 0.64, 0.512;
    1, 0.88, 0.7744, 0.681472
]
a := XI^-1*vy
a = [-0.551926; 3.52287; -3.97144; 2.54881]
k := n .. 0
L(x) := sum(a[k]*x^k, k)
L(0.80) = 1.02964
L(0.774) = 0.977426
x := [0.7; 0.8; 0.9; 1.0; 1.1; 1.2]
y := [1.3695; 1.5082; 1.6763; 1.8768; 2.1130; 2.3881]
h := 0.8 - 0.7 = 0.1
t := 0 .. 5
d := 0.1
Mx[t] := 0.7 + d*t
Mx = [0.7; 0.8; 0.9; 1; 1.1; 1.2]
My := [1.3695; 1.5082; 1.6763; 1.8768; 2.1130; 2.3881]
n := length(Mx) - 1
n = 5
i := 0 .. n
k := n .. 0
k_Difference(y, k, i) := sum(product(if(ik == j, 1, k - j), j = 0 .. ik)*(-1)^ik*y[i + k - ik]/ik!, ik = 0 .. k)
Newton(y, x, in, h) := sum(product(if(j == i, 1, (in - x[0])/h - j), j = 0 .. i)*k_Difference(y, i, 0)/i!, i = 0 .. length(x) - 1)
x[1] := 0.8
Newton(My, Mx, x[1], d) = 1.5082
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Newton(My, Mx, Mx[t], d) - My[t]
Newton(My, Mx, Mx[t], d) - My[t] = [0; 0; 0; -6.66134e-16; -1.33227e-15; 1.77636e-15]
