f(x) := 3*x^2 + tan(x)
a := -0.5
b := 0.5
n := 100
dif_n(x, n) := d^n/dx^n(f(x))
integral(f(x), x = -0.5 .. 0.5) = 0.25
Integr(a, b, n, char) :=
    hf ← (b - a)/n
    for i ∈ 0 .. n
        xf[i] ← a + hf*i
        dif[i] ← |dif_n(xf[i], 1)|
    [
        if(char == "left", hf*sum(f(xf[t]), t = 0 .. n - 1), hf*sum(f(xf[t]), t = 1 .. n));
        ((b - a)*hf/2)*max(dif)
    ]
Integr(a, b, n, "left") = [0.244587; 0.0214922]
Integr(a, b, n, "right") = [0.255513; 0.0214922]
Trapes(a, b, n) :=
    hf ← (b - a)/n
    for i ∈ 0 .. n
        xf[i] ← a + hf*i
        dif[i] ← |dif_n(xf[i], 2)|
    [hf*((f(xf[0]) + f(xf[n]))/2 + sum(f(xf[t]), t = 1 .. n - 1)); ((b - a)*hf^2/12)*max(dif)]
Trapes(a, b, n) = [0.25005; 6.18224e-5]
Simpson(a, b, n) :=
    n ← n + 1 if mod(n, 2) ≠ 0
    hf ← (b - a)/n
    for i ∈ 0 .. n
        xf[i] ← a + hf*i
        dif[i] ← |dif_n(xf[i], 4)|
    [
        (hf/3)*(f(xf[0]) + f(xf[n]) + 4*sum(f(xf[2*iUneven - 1]), iUneven = 1 .. n/2) + 2*sum(f(xf[2*iEven - 2]), iEven = 1 .. n/2));
        ((b - a)*hf^4/180)*max(dif)
    ]
Simpson(a, b, n) = [0.251358; 9.12797e-10]
