f(x, y) := x*y + sin(x)
a := 0
b := 1
y0 := 2
h2 := 0.05
n2 := (b - a)/h2
h := 0.1
n := (b - a)/h
n = 10
n2 = 20
i := 0 .. n
y[0] := y0
x[i] := a + i*h
yy0 := 2
y[i + 1] := y[i] + h*f(x[i], y[i])
i := 0 .. n2
yy[0] := yy0
xx[i] := a + i*h2
yy[i + 1] := yy[i] + h2*f(xx[i], yy[i])
y = [2; 2; 2.02998; 2.09045; 2.18272; 2.30897; 2.47236; 2.67716; 2.92899; 3.23504; 3.60453; 4.04913]
yy = [2; 2; 2.0075; 2.02253; 2.04517; 2.07555; 2.11387; 2.16035; 2.2153; 2.27908; 2.35211; 2.43488; 2.52798; 2.63205; 2.74785; 2.87623; 3.01817; 3.17477; 3.34726; 3.53705; 3.74574; 3.9751]
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eyler(fn, a, b, h, y0) :=
    n ← (b - a)/h
    y[0] ← y0
    for i ∈ 0 .. n - 1
        x[i] ← a + i*h
        Δy[i] ← h*fn(x[i], y[i])
        y[i + 1] ← y[i] + Δy[i]
    y
ES_h2 := eyler(f, a, b, h/2, y0) = [2; 2; 2.0075; 2.02253; 2.04517; 2.07555; 2.11387; 2.16035; 2.2153; 2.27908; 2.35211; 2.43488; 2.52798; 2.63205; 2.74785; 2.87623; 3.01817; 3.17477; 3.34726; 3.53705; 3.74574]
ES_h := eyler(f, a, b, h, y0) = [2; 2; 2.02998; 2.09045; 2.18272; 2.30897; 2.47236; 2.67716; 2.92899; 3.23504; 3.60453]
|ES_h2[length(ES_h2) - 1] - ES_h[length(ES_h) - 1]| = 0.141209
